Simulations: Version=147
  Memo TitlePage
    # The APSIM Wheat Model

    _Brown, H.E., Huth, N.I. and Holzworth, D.P._
  Memo Introduction
    The APSIM wheat model has been developed using the Plant Modelling Framework (PMF) of [brown_plant_2014]. This new framework provides a library of plant organ and process submodels that can be coupled, at runtime, to construct a model in much the same way that models can be coupled to construct a simulation. This means that dynamic composition of lower level process and organ classes (e.g. photosynthesis, leaf) into larger constructions (e.g. maize, wheat, sorghum) can be achieved by the model developer without additional coding.

    The wheat model consists of:

    * a phenology model to simulate development through sequential developmental phases
    * a structure model to simulate plant morphology
    * a collection of organs to simulate the various plant parts
    * an arbitrator to allocate resources (N, biomass) to the various plant organs

    This work builds upon earlier APSIM Wheat models such as NWheat ([Asseng200225], [KeatingNWheat]), NWheatS ([Asseng1998163]), Cropmod-Wheat ([Wang2002GenericCropModel]), and the earlier versions developed in Plant (<a href=\"http://www.apsim.info/Documentation/Model,CropandSoil/CropModuleDocumentation/Wheat.aspx">APSIM Wheat 7.5</a>") and then within the Plant Modelling Framework ([brown_plant_2014]).
  Replacements
    Report HarvestReport: EventNames=[Wheat].Harvesting
      VariableNames:
        [Clock].Today
        [Wheat].SowingDate
        [Wheat].SowingData.Cultivar
        [Wheat].Phenology.CurrentPhase.Name
        [Wheat].Phenology.CurrentStageName
        [Wheat].Phenology.EmergenceDAS
        [Wheat].Phenology.TerminalSpikeletDAS
        [Wheat].Phenology.FlagLeafDAS
        [Wheat].Phenology.HeadingDAS
        [Wheat].Phenology.FloweringDAS
        [Wheat].Phenology.MaturityDAS
        [Wheat].Grain.Wt
        [Wheat].Grain.N
        [Wheat].Grain.Number
        [Wheat].Grain.Size
        [Wheat].Grain.Nconc
        [Wheat].AboveGround.Wt
        [Wheat].AboveGround.N
        [Wheat].Grain.Protein
        [Wheat].Grain.Size
        [Wheat].Phenology.FinalLeafNumber
        [Wheat].Structure.MainStemPopn
        [Wheat].SowingData.Cultivar
        [Wheat].SowingDate.DayOfYear
        [Wheat].Leaf.CohortMaxSize
        [Clock].StartDate
        ([Wheat].Phenology.FloweringDAS - [Wheat].Phenology.EmergenceDAS) as FloweringDAE
        [IWeather].Latitude
        [IWeather].Longitude
        [IWeather].FileName
        [IWeather].CO2
        [IWeather].Amp
        [IWeather].Tav
        [LocationInfo].Script.Country
        [LocationInfo].Script.State
        [LocationInfo].Script.Region
    Report DailyReport: EventNames=[Clock].DoReport
      VariableNames:
        [Clock].Today
        [Soil].SoilWater.SW
        sum([Soil].SoilWater.SWmm) as ProfileWater
        sum([Soil].Nutrient.NO3.kgha) as TotalNO3
        [IWeather].Radn
        [IWeather].MeanT
        [Wheat].AboveGround.N
        [Wheat].AboveGround.Wt
        [Wheat].AboveGroundLive.N
        [Wheat].AboveGroundLive.Wt
        [Wheat].AboveGroundDead.N
        [Wheat].AboveGroundDead.Wt
        [Wheat].Ear.N
        [Wheat].Ear.Nconc
        [Wheat].Ear.Wt
        [Wheat].Grain.N
        [Wheat].Grain.NConc
        [Wheat].Grain.Number
        [Wheat].Grain.Size
        [Wheat].Grain.Wt
        [Wheat].Leaf.AppearedCohortNo
        [Wheat].Leaf.CoverGreen
        [Wheat].Leaf.CoverTotal
        [Wheat].Leaf.Dead.N
        [Wheat].Leaf.Dead.NConc
        [Wheat].Leaf.Dead.Wt
        [Wheat].Leaf.DeadCohortNo
        [Wheat].Leaf.SenescingCohortNo
        [Wheat].Leaf.ExpandedCohortNo
        [Wheat].Leaf.Fn
        [Wheat].Leaf.Fw
        [Wheat].Leaf.Height
        [Wheat].Leaf.InitialisedCohortNo
        [Wheat].Leaf.LAI
        [Wheat].Leaf.Live.N
        [Wheat].Leaf.Live.NConc
        [Wheat].Leaf.Live.Wt
        [Wheat].Leaf.SpecificArea
        [Wheat].Leaf.SpecificNitrogen
        [Wheat].Leaf.Transpiration
        [Wheat].Phenology.CurrentPhase.Name
        [Wheat].Phenology.CurrentStageName
        [Wheat].Phenology.EmergenceDAS
        [Wheat].Phenology.Stage
        [Wheat].Phenology.ThermalTime
        [Wheat].Phenology.Zadok.Stage
        [Wheat].Root.Depth
        [Wheat].Root.N
        [Wheat].Root.Wt
        [Wheat].Root.Nconc
        [Wheat].Spike.N
        [Wheat].Spike.NConc
        [Wheat].Spike.Wt
        [Wheat].Stem.N
        [Wheat].Stem.NConc
        [Wheat].Stem.Wt
        [Wheat].StemPlusSpike.Wt
        [Wheat].StemPlusSpike.N
        [Wheat].SowingData.Cultivar
        [Wheat].Phenology.HaunStage
        [Wheat].Phenology.HaunStage
        [Wheat].Structure.Height
        [Wheat].Structure.LeafTipsAppeared
        [Wheat].Structure.FinalLeafNumber
        [Wheat].Structure.MainStemPopn
        [Wheat].Structure.TotalStemPopn
        [Wheat].Phenology.PTQ
        [Wheat].Structure.Phyllochron
        [Wheat].Total.N
        [Wheat].Total.Wt
        ([Wheat].Leaf.Transpiration + [Soil].SoilWater.Es + [MicroClimate].PrecipitationInterception) as ET
        [IWeather].MeanT
        [Wheat].Phenology.Photoperiod
        [Wheat].Phenology.AccumulatedTT
    Manager MaxLeafSize
```csharp
using Newtonsoft.Json;
using APSIM.Shared.Utilities;
using Models.Soils.Arbitrator;
using Models.PMF.Organs;
using Models.PMF;
using Models.Interfaces;
using Models.Core;
using System.Xml.Serialization;
using System.Collections.Generic;
using System;
using Models.PMF.Struct;



namespace Models
{
    [Serializable] 
    public class Script : Model
    {
        [Link] private Clock Clock;
        [Link] private Plant Wheat;
        public  event EventHandler LeafReport;
        [Link(Type = LinkType.Path, Path = "[Wheat].Structure")]
        private Structure structure;
        
        
        [JsonIgnore] public int LeafPosition { get; set; }
        [JsonIgnore] public double MaxLeafSize { get; set; }
        
        [EventSubscribe("DoManagement")]
        private void OnDoManagement(object sender, EventArgs e)
        {
            var leaf = Wheat.Leaf as Leaf;
            if ((leaf.ExpandedCohortNo > LeafPosition) & (structure.NextLeafProportion == 1))
            {
                LeafPosition = (int)
                leaf.ExpandedCohortNo;
                MaxLeafSize = leaf.CohortSize[LeafPosition - 1];
                LeafReport.Invoke(this, new EventArgs());
            }
        }
    }
}
```
    Report MaxLeafSizeReport: EventNames=[MaxLeafSize].Script.LeafReport
      VariableNames:
        [MaxLeafSize].Script.MaxLeafSize
        [MaxLeafSize].Script.LeafPosition
    Manager Harvesting
```csharp
using Models.PMF.Phen;
using APSIM.Shared.Utilities;
using System.Xml.Serialization;
using Models;
using Models.PMF;
using Models.Soils;
using System.Text;
using System.Collections.Generic;
using Models.Core;
using System;
using Models.Soils.Nutrients;

namespace Models
{
    [Serializable] 
    public class Script : Model
    {
        [Link] private Plant Wheat;
        [Link] private Simulation sim;
        [Link] private Clock clock;
        [Link(Type = LinkType.Path, Path = "[Wheat].Phenology")]
        private Phenology phenology;

        [EventSubscribe("DoManagement")]
        private void OnDoManagement(object sender, EventArgs e)
        {
            if (phenology.CurrentPhase.Name == "Maturing")
            {
                Wheat.Harvest();
                Wheat.EndCrop();
                sim.Set("Clock.EndDate", clock.Today);  
            }
        }

        [EventSubscribe("EndOfDay")]
        private void OnEndOfDay(object sender, EventArgs e)
        {
        	if ((clock.Today.Equals(clock.EndDate))&&(Wheat.IsAlive))
        	{
        		Wheat.Harvest();
                Wheat.EndCrop();
                sim.Set("Clock.EndDate", clock.Today);  
        	}
        }

    }
}
```
    Report SowingReport: EventNames=[Wheat].Sowing
      VariableNames:
        [Clock].Today
        [Wheat].SowingData.Cultivar
        [IWeather].Latitude
        [IWeather].Longitude
        [LocationInfo].Script.Country
        [LocationInfo].Script.State
        [LocationInfo].Script.Region
  DataStore
  Folder Validation
    Memo
      A test dataset has been developed to test the APSIM Wheat model for a range of environmental (soil and climate) conditions, management options (sowing dates, populations, nitrogen rates, row spacing, irrigation), genetic backgrounds (different regions, cultivar types) and for special considerations such as crop damage.  These tests have been grouped into various geographical regions to allow the user to evaluate the suitability of the model for their particular region of interest.  Graphs of model performance are provided for yield, biomass production, canopy development, phenological development, water and nitrogen uptake, and grain yield components.
    Folder NPIField2020
      Experiment Urrbrae2020
        Factors
          Permutation
            Factor TOS
              CompositeFactor 1
                Specifications:
                  [Sowing].Script.SowDate = 2-Mar
                  [Clock].StartDate = 2020-03-02
                  [Sowing].Script.Treat = 1
              CompositeFactor 2
                Specifications:
                  [Sowing].Script.SowDate = 16-Mar
                  [Clock].StartDate = 2020-03-16
                  [Sowing].Script.Treat = 2
              CompositeFactor 3
                Specifications:
                  [Sowing].Script.SowDate = 1-Apr
                  [Clock].StartDate = 2020-04-01
                  [Sowing].Script.Treat = 3
              CompositeFactor 4
                Specifications:
                  [Sowing].Script.SowDate = 14-Apr
                  [Clock].StartDate = 2020-04-14
                  [Sowing].Script.Treat = 4
              CompositeFactor 5
                Specifications:
                  [Sowing].Script.SowDate = 4-May
                  [Clock].StartDate = 2020-05-04
                  [Sowing].Script.Treat = 5
              CompositeFactor 6
                Specifications:
                  [Sowing].Script.SowDate = 15-May
                  [Clock].StartDate = 2020-05-15
                  [Sowing].Script.Treat = 6
              CompositeFactor 7
                Specifications:
                  [Sowing].Script.SowDate = 29-May
                  [Clock].StartDate = 2020-05-29
                  [Sowing].Script.Treat = 7
              CompositeFactor 8
                Specifications:
                  [Sowing].Script.SowDate = 18-Jun
                  [Clock].StartDate = 2020-06-18
                  [Sowing].Script.Treat = 8
            Factor Cv
              Specification=[Sowing].Script.CultivarName = Young, Yitpi, Wyalkatchem, Wills, Whistler, Wedgetail, Trojan, Suntop, Sunstate, Sunlamb, Sunbri, Sunbee, Strzelecki, Spitfire, Scythe, Scout, Scepter, Revenue, Peake, Ouyen, Mitch, Merinda, Manning, Magenta, Mace, Longsword, Lancer, Kittyhawk, Kellalac, Janz, Hume, H45, Grenade, Gregory, Gauntlet, Forrest, Emu_Rock, Ellison, Eaglehawk, Derrimut, Cutlass, CSIROW105, CSIROW102, CSIROW087, CSIROW077, CSIROW073, CSIROW029, CSIROW027, CSIROW023, CSIROW021, CSIROW018, CSIROW011, CSIROW007, CSIROW005, CSIROW003, CSIROW002, Crusader, Catalina, Calingiri, Braewood, Bolac, Beaufort, Axe
        Simulation Urrbrae2020Base
          Weather: FileName=2020NPI_Urrbrae.met
          Clock: Start=2020-03-02; End=2020-11-11
          Summary
          SoilArbitrator
          Zone Field: Area=1; Slope=0; AspectAngle=0; Altitude=50
            Soil: SoilType=Black Vertosol; Site=Lawes; NearestTown=Lawes, Q 4343; Region=Lockyer; State=Queensland; Country=Australia; NaturalVegetation=Blue Gum, Moreton Bay Ash, Tea Tree; ApsoilNumber=38; Latitude=-27.537; Longitude=152.336; LocationAccuracy=+-20m; DataSource=CSIRO Sustainable Ecosystems, Toowoomba
              Comments=Soil naming structure: \State\Region\Classification-Local Name (Site/district and locator number); oc and ph estimated
              Physical
                Thickness  BD    AirDry  LL15  DUL   SAT
                150        1.32  0.13    0.26  0.41  0.47
                150        1.3   0.208   0.26  0.43  0.48
                300        1.23  0.26    0.26  0.46  0.51
                300        1.27  0.26    0.26  0.44  0.49
                300        1.37  0.25    0.25  0.4   0.45
                300        1.35  0.26    0.26  0.41  0.46
                300        1.35  0.26    0.26  0.38  0.46
                SoilCrop WheatSoil: LL=[0.26, 0.26, 0.26, 0.26, 0.25, 0.29, 0.36]; KL=[0.06, 0.06, 0.06, 0.04, 0.04, 0.02, 0.02]; XF=[1, 1, 1, 1, 1, 1, 1]
              WaterBalance SoilWater: SummerDate=1-Nov; SummerU=6; SummerCona=3.5; WinterDate=1-Apr; WinterU=4; WinterCona=2.5; DiffusConst=40; DiffusSlope=16; Salb=0.12; CN2Bare=73; CNRed=20; CNCov=0.8; Thickness=[150, 150, 300, 300, 300, 300, 300]; SWCON=[0.3, 0.3, 0.3, 0.3, 0.3, 0.3, 0.3]
              Organic: FOMCNRatio=40
                Thickness  Carbon  SoilCNRatio  FBiom  FInert  FOM
                150        0.9538  12           0.04   0.4     347.129
                150        0.9538  12           0.02   0.6     270.3444
                300        0.9615  12           0.02   0.8     163.9721
                300        0.8462  12           0.02   1       99.4541
                300        0.5462  12           0.01   1       60.322
                300        0.2615  12           0.01   1       36.5871
                300        0.2     12           0.01   1       22.1912
              Chemical
                Thickness  NO3N     NH4N    PH
                150        10.101   0.5051  8
                150        10.2564  0.5128  8
                300        2.71     0.271   8
                300        0.7874   0.2625  8
                300        0.4866   0.2433  8
                300        0.2469   0.2469  8
                300        0.2469   0.2469  8
              InitialWater: PercentMethod=0; FractionFull=1; RelativeTo=LL15
              CERESSoilTemperature Temperature
              Nutrient
            Report DailyReport: EventNames=[Wheat].Harvesting
              VariableNames:
                [Clock].Today
                [Wheat].Phenology.FloweringDAS
                [Wheat].Phenology.FlagLeafDAS
                [Wheat].Phenology.TerminalSpikeletDAS
            Report HarvestReport: EventNames=[Clock].DoReport
              VariableNames:
                [Clock].Today
                [Wheat].Phenology.Stage
                [Wheat].Phenology.Zadok.Stage
                [Wheat].Phenology.FloweringDAS
                [Wheat].Phenology.FlagLeafDAS
                [Wheat].Phenology.TerminalSpikeletDAS
            Fertiliser
            SurfaceOrganicMatter: InitialResidueName=wheat_stubble; InitialResidueType=wheat; InitialResidueMass=500; InitialStandingFraction=0; InitialCPR=0; InitialCNR=100
            Plant Wheat
            MicroClimate: a_interception=0; b_interception=1; c_interception=0; d_interception=0; SoilHeatFluxFraction=0.4; MinimumHeightDiffForNewLayer=0; NightInterceptionFraction=0.5; ReferenceHeight=2
            Manager Sowing
              SowDate =
              Treat =
              CultivarName =
              SowingDepth = 50
              RowSpacing = 250
              Population = 150
              FilePath = %root%\Tests\Validation\Wheat\UrrbraeEmergenceDates.csv
```csharp
using Newtonsoft.Json;
using System.Data;
using System.Xml.Serialization;
using Models;
using System.Text;
using System.Collections.Generic;
using Models.Interfaces;
using System;
using Models.Core;
using Models.PMF;
using Models.Soils;
using Models.Utilities;
using APSIM.Shared.Utilities;

namespace Models
{
    [Serializable]
    public class Script : Model
    {
        [Link] Clock Clock;
        [Link] Fertiliser Fertiliser;
        [Link] Summary Summary;
        [Link] Soil Soil;
        [Link] Plant Wheat;
        [Link] Simulation Simulation;
        Accumulator accumulatedRain;
        
        [Description("Sowing date (d-mmm)")]
        public string SowDate { get; set; }
        [Description("Treatment Name")]
        public string Treat { get; set; }
        [Display(Type = DisplayType.CultivarName)]
        [Description("Cultivar to be sown")]
        public string CultivarName { get; set; }
        [Description("Sowing depth (mm)")]
        public double SowingDepth { get; set; }
        [Description("Row spacing (mm)")]
        public double RowSpacing { get; set; }
        [Description("Plant population (/m2)")]
        public double Population { get; set; }

        [Description("Emergence Date File Path")]
        public string FilePath {get; set;}

        private DateTime EmergenceDate {get; set;}
        private string EmergenceString {get; set;}

        [JsonIgnore] private DataTable EmergDates{ get; set; }

        [EventSubscribe("StartOfSimulation")]
        private void OnStartOfSimulation(object sender, EventArgs e)
        {
            
            string fullFileName = PathUtilities.GetAbsolutePath(FilePath, Simulation.FileName);
            
            ApsimTextFile textFile = new ApsimTextFile();
            textFile.Open(fullFileName);
            EmergDates = textFile.ToTable();
            textFile.Close();
        }

        [EventSubscribe("DoManagement")]
        private void OnDoManagement(object sender, EventArgs e)
        {

            if (DateUtilities.WithinDates(SowDate, Clock.Today, SowDate))
            {
                
                foreach (DataRow row in EmergDates.Rows)
                {
                    string Env = Convert.ToString(row["TOS"]);
                    if (Env == Treat)
                    {
                        EmergenceDate = Convert.ToDateTime(row[CultivarName]);
                        EmergenceString = EmergenceDate.ToString("dd-MMM");
                    }
                }

                Wheat.Sow(population: Population, cultivar: CultivarName, depth: SowingDepth, rowSpacing: RowSpacing);    
                Wheat.SetEmergenceDate(EmergenceString);
            }
        
        }
        
    }
}
```
            Manager SowingFertiliser
              Amount = 200
              CropName = wheat
```csharp
using Models.PMF;
using Models.Core;
using System;
namespace Models
{
    [Serializable]
    public class Script : Model
    {
        [Link] Clock Clock;
        [Link] Fertiliser Fertiliser;
        [Link] Summary Summary;
        
        
        [Description("Amount of fertiliser to be applied (kg/ha)")]
        public double Amount { get; set;}
        
        [Description("Crop to be fertilised")]
        public string CropName { get; set;}
        
        
        

        [EventSubscribe("Sowing")]
        private void OnSowing(object sender, EventArgs e)
        {
            Model crop = sender as Model;
            if (crop.Name.ToLower()==CropName.ToLower())
                Fertiliser.Apply(Amount: Amount, Type: Fertiliser.Types.NO3N);
        }
        
    }
}
```
            Report SowingReport
            Operations Management
            Irrigation
            Manager Harvesting
```csharp
using APSIM.Shared.Utilities;
using Models.Utilities;
using Models.Soils;
using Models.PMF;
using Models.Core;
using System;

namespace Models
{
    [Serializable]
    public class Script : Model
    {
        [Link] Plant Wheat;
        [Link] private Clock Clock;
        [Link] private Simulation sim;

        [EventSubscribe("DoManagement")]
        private void OnDoManagement(object sender, EventArgs e)
        {
            if (Wheat.IsReadyForHarvesting)
            {
               Wheat.Harvest();
               Wheat.EndCrop();  
               sim.Set("Clock.EndDate", Clock.Today.AddDays(1));  
            }
        
        }
        
    }
}
```
          Manager LocationInfo
            Country = Australia
            State = South Australia
            Region = SA VIC Mallee
```csharp
using APSIM.Shared.Utilities;
using Models.PMF;
using Models.Core;
using System;

namespace Models
{
    [Serializable]
    public class Script : Model
    {
        [Link] Clock Clock;
        [Link] Fertiliser Fertiliser;
        [Link] Summary Summary;
        
        [Description("Country")]
        public string Country { get; set; }

        [Description("State")]
        public string State { get; set; }

        [Description("Region")]
        public string Region { get; set; }

    }
}
```
      Experiment WaggaWagga2020
        Factors
          Permutation
            Factor TOS
              CompositeFactor 1
                Specifications:
                  [Sowing].Script.SowDate = 3-Mar
                  [Clock].StartDate = 2020-03-03
                  [Sowing].Script.Treat = 1
              CompositeFactor 2
                Specifications:
                  [Sowing].Script.SowDate = 17-Mar
                  [Clock].StartDate = 2020-03-17
                  [Sowing].Script.Treat = 2
              CompositeFactor 3
                Specifications:
                  [Sowing].Script.SowDate = 30-Mar
                  [Clock].StartDate = 2020-03-30
                  [Sowing].Script.Treat = 3
              CompositeFactor 4
                Specifications:
                  [Sowing].Script.SowDate = 14-Apr
                  [Clock].StartDate = 2020-04-14
                  [Sowing].Script.Treat = 4
              CompositeFactor 5
                Specifications:
                  [Sowing].Script.SowDate = 28-Apr
                  [Clock].StartDate = 2020-04-28
                  [Sowing].Script.Treat = 5
              CompositeFactor 6
                Specifications:
                  [Sowing].Script.SowDate = 12-May
                  [Clock].StartDate = 2020-05-12
                  [Sowing].Script.Treat = 6
              CompositeFactor 7
                Specifications:
                  [Sowing].Script.SowDate = 26-May
                  [Clock].StartDate = 2020-05-26
                  [Sowing].Script.Treat = 7
              CompositeFactor 8
                Specifications:
                  [Sowing].Script.SowDate = 9-Jun
                  [Clock].StartDate = 2020-06-09
                  [Sowing].Script.Treat = 8
            Factor Cv: same as Validation.NPIField2020.Urrbrae2020.Factors.Permutation.Cv
        Simulation WaggaWagga2020Base
          Weather: FileName=2020NPI_WaggaWagga.met
          Clock: Start=2020-03-03; End=2020-11-11
          Summary
          SoilArbitrator
          Zone Field: Area=1; Slope=0; AspectAngle=0; Altitude=50
            Soil: same as Validation.NPIField2020.Urrbrae2020.Urrbrae2020Base.Field.Soil
            Report DailyReport: EventNames=[Wheat].Harvesting
              VariableNames:
                [Clock].Today
                [Wheat].Phenology.FloweringDAS
                [Wheat].Phenology.FlagLeafDAS
                [Wheat].Phenology.TerminalSpikeletDAS
            Report HarvestReport: EventNames=[Clock].DoReport
              VariableNames:
                [Clock].Today
                [Wheat].Phenology.Stage
                [Wheat].Phenology.Zadok.Stage
                [Wheat].Phenology.FloweringDAS
                [Wheat].Phenology.FlagLeafDAS
                [Wheat].Phenology.TerminalSpikeletDAS
            Fertiliser
            SurfaceOrganicMatter: InitialResidueName=wheat_stubble; InitialResidueType=wheat; InitialResidueMass=500; InitialStandingFraction=0; InitialCPR=0; InitialCNR=100
            Plant Wheat
            MicroClimate: a_interception=0; b_interception=1; c_interception=0; d_interception=0; SoilHeatFluxFraction=0.4; MinimumHeightDiffForNewLayer=0; NightInterceptionFraction=0.5; ReferenceHeight=2
            Manager Sowing
              SowDate =
              Treat =
              CultivarName =
              SowingDepth = 50
              RowSpacing = 250
              Population = 150
              FilePath = %root%\Tests\Validation\Wheat\WaggaWaggaEmergenceDates2020.csv
              script: same as in Validation.NPIField2020.Urrbrae2020.Urrbrae2020Base.Field.Sowing
            Manager SowingFertiliser: same as Validation.NPIField2020.Urrbrae2020.Urrbrae2020Base.Field.SowingFertiliser
            Manager Harvesting: same as Validation.NPIField2020.Urrbrae2020.Urrbrae2020Base.Field.Harvesting
            Report SowingReport
            Operations Management
            Irrigation
          Manager LocationInfo
            Country = Australia
            State = New South Wales
            Region = NSW VIC Slopes
            script: same as in Validation.NPIField2020.Urrbrae2020.Urrbrae2020Base.LocationInfo
      Experiment Dale2020
        Factors
          Permutation
            Factor TOS
              CompositeFactor 1
                Specifications:
                  [Sowing].Script.SowDate = 4-Mar
                  [Clock].StartDate = 2020-03-04
                  [Sowing].Script.Treat = 1
              CompositeFactor 2
                Specifications:
                  [Sowing].Script.SowDate = 18-Mar
                  [Clock].StartDate = 2020-03-18
                  [Sowing].Script.Treat = 2
              CompositeFactor 3
                Specifications:
                  [Sowing].Script.SowDate = 1-Apr
                  [Clock].StartDate = 2020-04-01
                  [Sowing].Script.Treat = 3
              CompositeFactor 4
                Specifications:
                  [Sowing].Script.SowDate = 15-Apr
                  [Clock].StartDate = 2020-04-15
                  [Sowing].Script.Treat = 4
              CompositeFactor 5
                Specifications:
                  [Sowing].Script.SowDate = 5-May
                  [Clock].StartDate = 2020-05-05
                  [Sowing].Script.Treat = 5
              CompositeFactor 6
                Specifications:
                  [Sowing].Script.SowDate = 19-May
                  [Clock].StartDate = 2020-05-19
                  [Sowing].Script.Treat = 6
              CompositeFactor 7
                Specifications:
                  [Sowing].Script.SowDate = 2-Jun
                  [Clock].StartDate = 2020-06-02
                  [Sowing].Script.Treat = 7
              CompositeFactor 8
                Specifications:
                  [Sowing].Script.SowDate = 16-Jun
                  [Clock].StartDate = 2020-06-16
                  [Sowing].Script.Treat = 8
            Factor Cv: same as Validation.NPIField2020.Urrbrae2020.Factors.Permutation.Cv
        Simulation Dale2020Base
          Weather: FileName=2020NPI_Dale.met
          Clock: Start=2020-03-02; End=2020-11-11
          Summary
          SoilArbitrator
          Zone Field: Area=1; Slope=0; AspectAngle=0; Altitude=50
            Soil: same as Validation.NPIField2020.Urrbrae2020.Urrbrae2020Base.Field.Soil
            Report DailyReport: EventNames=[Wheat].Harvesting
              VariableNames:
                [Clock].Today
                [Wheat].Phenology.FloweringDAS
                [Wheat].Phenology.FlagLeafDAS
                [Wheat].Phenology.TerminalSpikeletDAS
            Report HarvestReport: EventNames=[Clock].DoReport
              VariableNames:
                [Clock].Today
                [Wheat].Phenology.Stage
                [Wheat].Phenology.Zadok.Stage
                [Wheat].Phenology.FloweringDAS
                [Wheat].Phenology.FlagLeafDAS
                [Wheat].Phenology.TerminalSpikeletDAS
            Fertiliser
            SurfaceOrganicMatter: InitialResidueName=wheat_stubble; InitialResidueType=wheat; InitialResidueMass=500; InitialStandingFraction=0; InitialCPR=0; InitialCNR=100
            Plant Wheat
            MicroClimate: a_interception=0; b_interception=1; c_interception=0; d_interception=0; SoilHeatFluxFraction=0.4; MinimumHeightDiffForNewLayer=0; NightInterceptionFraction=0.5; ReferenceHeight=2
            Manager Sowing
              SowDate =
              Treat =
              CultivarName =
              SowingDepth = 50
              RowSpacing = 250
              Population = 150
              FilePath = %root%\Tests\Validation\Wheat\DaleEmergenceDates2020.csv
              script: same as in Validation.NPIField2020.Urrbrae2020.Urrbrae2020Base.Field.Sowing
            Manager SowingFertiliser: same as Validation.NPIField2020.Urrbrae2020.Urrbrae2020Base.Field.SowingFertiliser
            Report SowingReport
            Operations Management
            Irrigation
            Manager Harvesting: same as Validation.NPIField2020.Urrbrae2020.Urrbrae2020Base.Field.Harvesting
          Manager LocationInfo
            Country = Australia
            State = Western Australia
            Region = WA Central Zone
            script: same as in Validation.NPIField2020.Urrbrae2020.Urrbrae2020Base.LocationInfo
      Experiment YanYean2020
        Factors
          Permutation
            Factor TOS
              CompositeFactor 1
                Specifications:
                  [Sowing].Script.SowDate = 2-Mar
                  [Clock].StartDate = 2020-03-02
                  [Sowing].Script.Treat = 1
              CompositeFactor 2
                Specifications:
                  [Sowing].Script.SowDate = 16-Mar
                  [Clock].StartDate = 2020-03-16
                  [Sowing].Script.Treat = 2
              CompositeFactor 3
                Specifications:
                  [Sowing].Script.SowDate = 1-Apr
                  [Clock].StartDate = 2020-04-01
                  [Sowing].Script.Treat = 3
              CompositeFactor 4
                Specifications:
                  [Sowing].Script.SowDate = 15-Apr
                  [Clock].StartDate = 2020-04-15
                  [Sowing].Script.Treat = 4
              CompositeFactor 5
                Specifications:
                  [Sowing].Script.SowDate = 28-Apr
                  [Clock].StartDate = 2020-04-28
                  [Sowing].Script.Treat = 5
              CompositeFactor 6 (disabled)
                Specifications:
                  [Sowing].Script.SowDate = 15-May
                  [Clock].StartDate = 2020-05-15
                  [Sowing].Script.Treat = 6
              CompositeFactor 7
                Specifications:
                  [Sowing].Script.SowDate = 29-May
                  [Clock].StartDate = 2020-05-29
                  [Sowing].Script.Treat = 7
              CompositeFactor 8
                Specifications:
                  [Sowing].Script.SowDate = 15-Jun
                  [Clock].StartDate = 2020-06-15
                  [Sowing].Script.Treat = 8
            Factor Cv: same as Validation.NPIField2020.Urrbrae2020.Factors.Permutation.Cv
        Simulation YanYean2020Base
          Weather: FileName=2020NPI_YanYean.met
          Clock: Start=2020-03-02; End=2020-11-11
          Summary
          SoilArbitrator
          Zone Field: Area=1; Slope=0; AspectAngle=0; Altitude=50
            Soil: same as Validation.NPIField2020.Urrbrae2020.Urrbrae2020Base.Field.Soil
            Report DailyReport: EventNames=[Wheat].Harvesting
              VariableNames:
                [Clock].Today
                [Wheat].Phenology.FloweringDAS
                [Wheat].Phenology.FlagLeafDAS
                [Wheat].Phenology.TerminalSpikeletDAS
            Report HarvestReport: EventNames=[Clock].DoReport
              VariableNames:
                [Clock].Today
                [Wheat].Phenology.Stage
                [Wheat].Phenology.Zadok.Stage
                [Wheat].Phenology.FloweringDAS
                [Wheat].Phenology.FlagLeafDAS
                [Wheat].Phenology.TerminalSpikeletDAS
            Fertiliser
            SurfaceOrganicMatter: InitialResidueName=wheat_stubble; InitialResidueType=wheat; InitialResidueMass=500; InitialStandingFraction=0; InitialCPR=0; InitialCNR=100
            Plant Wheat
            MicroClimate: a_interception=0; b_interception=1; c_interception=0; d_interception=0; SoilHeatFluxFraction=0.4; MinimumHeightDiffForNewLayer=0; NightInterceptionFraction=0.5; ReferenceHeight=2
            Manager Sowing
              SowDate =
              Treat =
              CultivarName =
              SowingDepth = 50
              RowSpacing = 250
              Population = 150
              FilePath = %root%\Tests\Validation\Wheat\YanYeanEmergenceDates2020.csv
              script: same as in Validation.NPIField2020.Urrbrae2020.Urrbrae2020Base.Field.Sowing
            Manager SowingFertiliser: same as Validation.NPIField2020.Urrbrae2020.Urrbrae2020Base.Field.SowingFertiliser
            Report SowingReport
            Operations Management
              2019-03-06  [Irrigation].Apply(amount:18);
              2019-03-18  [Irrigation].Apply(amount:18);
              2019-04-04  [Irrigation].Apply(amount:18);
              2019-04-17  [Irrigation].Apply(amount:18);
            Irrigation
            Manager Harvesting: same as Validation.NPIField2020.Urrbrae2020.Urrbrae2020Base.Field.Harvesting
          Manager LocationInfo
            Country = Australia
            State = Victoria
            Region =
            script: same as in Validation.NPIField2020.Urrbrae2020.Urrbrae2020Base.LocationInfo
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